# OpenSim document version 40000
XsensDataReaderSettings:
  trial_prefix: test_distance_analysis_DistanceKinematics_dist
  data_folder: results
  ExperimentalSensors:
    ExperimentalSensor _toes_l-toes_r: name_in_model=toes_l-toes_r
    ExperimentalSensor _toes_l-tibia_l: name_in_model=toes_l-tibia_l
    ExperimentalSensor _toes_l-talus_l: name_in_model=toes_l-talus_l
    ExperimentalSensor _toes_l-femur_l: name_in_model=toes_l-femur_l
    ExperimentalSensor _toes_l-torso: name_in_model=toes_l-torso
    ExperimentalSensor _toes_r-tibia_l: name_in_model=toes_r-tibia_l
    ExperimentalSensor _toes_r-talus_l: name_in_model=toes_r-talus_l
    ExperimentalSensor _toes_r-femur_l: name_in_model=toes_r-femur_l
    ExperimentalSensor _toes_r-torso: name_in_model=toes_r-torso
    ExperimentalSensor _calcn_l-tibia_l: name_in_model=calcn_l-tibia_l
    ExperimentalSensor _calcn_l-talus_l: name_in_model=calcn_l-talus_l
    ExperimentalSensor _calcn_l-femur_l: name_in_model=calcn_l-femur_l
    ExperimentalSensor _calcn_r-tibia_l: name_in_model=calcn_r-tibia_l
    ExperimentalSensor _calcn_r-talus_l: name_in_model=calcn_r-talus_l
    ExperimentalSensor _calcn_r-femur_l: name_in_model=calcn_r-femur_l
    ExperimentalSensor _torso-tibia_l: name_in_model=torso-tibia_l
    ExperimentalSensor _torso-talus_l: name_in_model=torso-talus_l
    ExperimentalSensor _torso-femur_l: name_in_model=torso-femur_l
    ExperimentalSensor _torso-calcn_l: name_in_model=torso-calcn_l
    ExperimentalSensor _torso-toes_l: name_in_model=torso-toes_l
    ExperimentalSensor _femur_r-tibia_r: name_in_model=femur_r-tibia_r
    ExperimentalSensor _femur_r-talus_r: name_in_model=femur_r-talus_r
    ExperimentalSensor _femur_r-toes_r: name_in_model=femur_r-toes_r
    ExperimentalSensor _femur_l-tibia_l: name_in_model=femur_l-tibia_l
    ExperimentalSensor _femur_l-talus_l: name_in_model=femur_l-talus_l
    ExperimentalSensor _femur_l-toes_l: name_in_model=femur_l-toes_l
    ExperimentalSensor _femur_l-torso: name_in_model=femur_l-torso
    ExperimentalSensor _pelvis-tibia_l: name_in_model=pelvis-tibia_l
    ExperimentalSensor _pelvis-talus_l: name_in_model=pelvis-talus_l
    ExperimentalSensor _pelvis-femur_l: name_in_model=pelvis-femur_l
    ExperimentalSensor _pelvis-toes_l: name_in_model=pelvis-toes_l
    ExperimentalSensor _pelvis-torso: name_in_model=pelvis-torso
    ExperimentalSensor _talus_l-tibia_l: name_in_model=talus_l-tibia_l
    ExperimentalSensor _talus_l-toes_l: name_in_model=talus_l-toes_l
    ExperimentalSensor _talus_l-torso: name_in_model=talus_l-torso
    ExperimentalSensor _talus_r-tibia_l: name_in_model=talus_r-tibia_l
    ExperimentalSensor _talus_r-toes_l: name_in_model=talus_r-toes_l
    ExperimentalSensor _talus_r-femur_l: name_in_model=talus_r-femur_l
    ExperimentalSensor _tibia_l-toes_l: name_in_model=tibia_l-toes_l
    ExperimentalSensor _tibia_l-torso: name_in_model=tibia_l-torso
    ExperimentalSensor _tibia_r-toes_l: name_in_model=tibia_r-toes_l
    ExperimentalSensor _tibia_r-torso: name_in_model=tibia_r-torso
